p1 := READPRN("electron.txt")
p2 := READPRN("Ion.txt")
p2 = [
    0, 0, -10, 0;
    1, 0, -10, 0;
    2, 0, -10, 0;
    3, 0, -10, 0;
    4, 0, -10, 0;
    5, 0, -10, 0;
    6, 0, -10, 0;
    7, 0, -10, 0;
    8, 0, -10, 0;
    9, 0, -10, 0
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]
p1 = [
    0, 0, 0, 0;
    1, 1, 0, 0;
    2, 2, -2.53187, 0;
    3, 2.75056, -7.5581, 0;
    4, 2.40537, -16.6759, 0;
    5, -11.9353, -38.2188, 0;
    6, -27.9804, -55.0311, 0;
    7, -43.9204, -71.5951, 0;
    8, -59.8129, -88.0826, 0;
    9, -75.6797, -104.534, 0
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]
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