p1 := READPRN("Kulon_a.txt")
p2 := READPRN("Kulon_b.txt")
p2 = [
    0, 0, 1e-6, 0;
    0.1, 0.2, 1e-6, 0;
    0.2, 0.4, 632967000000, 0;
    0.3, 253.787, 1265930000000, 0;
    0.4, 507.174, 1898900000000, 0;
    0.5, 760.56, 2531870000000, 0;
    0.6, 1013.95, 3164840000000, 0;
    0.7, 1267.33, 3797800000000, 0;
    0.8, 1520.72, 4430770000000, 0;
    0.9, 1774.11, 5063740000000, 0
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]
p1 = [
    0, 0, -1e-6, 0;
    0.1, 0.1, -1e-6, 0;
    0.2, 0.2, -632967000000, 0;
    0.3, -252.887, -1265930000000, 0;
    0.4, -505.974, -1898900000000, 0;
    0.5, -759.06, -2531870000000, 0;
    0.6, -1012.15, -3164840000000, 0;
    0.7, -1265.23, -3797800000000, 0;
    0.8, -1518.32, -4430770000000, 0;
    0.9, -1771.41, -5063740000000, 0
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]
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